// COMSOL Multiphysics 6.2.0.339 model "thermoelectric_model_01.mph"
// Outline of the model tree

Geometry
  geom1 "Geometry 1" (3D, length unit m)
    blk1: Block | size = {1[mm], 1[mm], 2[mm]}
    fin: Finalize "Form Union"

Materials
  mat1: Common "Copper" on all domains
    def "Basic"
      relpermeability = 1
      electricconductivity = 5.998e7[S/m]
      thermalexpansioncoefficient = 17e-6[1/K]
      heatcapacity = 385[J/(kg*K)]
      relpermittivity = 1
      density = 8960[kg/m^3]
      thermalconductivity = 400[W/(m*K)]
    Enu "Young's modulus and Poisson's ratio"
      E = 110[GPa]
      nu = 0.35
    linzRes "Linearized resistivity"
      rho0 = 1.72e-8[ohm*m]
      alpha = 0.0039[1/K]
      Tref = 298[K]

Physics
  ht: HeatTransfer "Heat Transfer in Solids" on all domains
    dependent variable T
    solid1: SolidHeatTransferModel "Solid 1" (default)
    init1: init "Initial Values 1" (default) | Tinit = 293[K]
    ins1: ThermalInsulation (default)
    temp1: TemperatureBoundary "Temperature 1" on boundaries 4 | T0 = 673[K]
    temp2: TemperatureBoundary "Temperature 2" on boundaries 2 | T0 = 293[K]
  ec: ConductiveMedia "Electric Currents" on all domains
    dependent variable V
    cucn1: CurrentConservation (default)
    ein1: ElectricInsulation (default)
    init1: init "Initial Values 1" (default)
    pot1: ElectricPotential on boundaries 2
    pot2: ElectricPotential on boundaries 4 | V0 = 0.01

Multiphysics
  tee1: ThermoelectricEffect on all domains | Heat_physics = none; EMCurrentDensity_physics = none
  emh1: ElectromagneticHeating on all domains | EMHeat_physics = none; Heat_physics = none

Mesh
  mesh1 "Mesh 1" (physics-controlled)

Studies
  std1 "Study 1"
    stat: Stationary

Solver configurations
  sol1 "Solution 1" (study std1)
    v1: Variables "Dependent Variables 1"
    s1: Stationary "Stationary Solver 1"
      se1: Segregated
        ss1: SegregatedStep "Electric Currents" | segvar = {comp1_V}; linsolver = i1
        ss2: SegregatedStep "Temperature" | segvar = {comp1_T}; linsolver = d1; subdamp = 0.8
        ll1: LowerLimit | lowerlimit = comp1.T 0
      i1: Iterative | linsolver = cg
        mg1: Multigrid | prefun = amg; coarseningmethod = classic
      d1: Direct "Direct, heat transfer variables (ht)" | linsolver = pardiso; pivotperturb = 1.0E-13

Datasets
  dset1: Solution | solution = sol1

Derived values
  max1: MaxVolume "Electric Currents" on all domains | data = dset1; table = tbl1; expr = V

Tables
  tbl1: Table
    // Volume Maximum 1
    ec.V | ec.V | Electric potential (V)
    nan | nan | 0.0106

Plots
  pg1: PlotGroup3D "Temperature (ht)" | data = dset1
    vol1: Volume | expr = T
  pg2: PlotGroup3D "Electric Potential (ec)" | data = dset1
    vol1: Volume | expr = V
  pg3: PlotGroup3D "Electric Field Norm (ec)" | data = dset1
    mslc1: Multislice
      expr = ec.normE
      multiplanexmethod = coord
      xcoord = ec.CPx
      multiplaneymethod = coord
      ycoord = ec.CPy
      multiplanezmethod = coord
      zcoord = ec.CPz
    strmsl1: StreamlineMultislice
      expr = {ec.Ex, ec.Ey, ec.Ez}
      multiplanexmethod = coord
      xcoord = ec.CPx
      multiplaneymethod = coord
      ycoord = ec.CPy
      multiplanezmethod = coord
      zcoord = ec.CPz
      udist = 0.02
      col1: Color "Color Expression 1" | expr = ec.normE
      filt1: Filter | expr = !isScalingSystemDomain